log                ${dname}/log.lammps
echo               both
dimension          2
units              si
atom_style         meso
boundary          p p p
include           2d-vars.lmp
# create simulation box
variable           pLz    equal  1.0e-6
variable           nLz    equal  -1.0e-6
region             box block 0.0 ${Lx}  0.0 ${Ly} ${nLz} ${pLz} units box
create_box         1 box

# create fluid particles
lattice            sq ${dx}
create_atoms       1 region box

mass               1 ${sph_mass}
set                group all meso_rho ${sph_rho}

# use Tait's EOS in combination with Morris' laminar viscosity.
# We set rho_0 = 1000 kg/m^3, c = 0.1 m/s, h = 6.5e-5 m.
# The dynamic viscosity is set to 1.0e-3 Pa s, corresponding to a kinematic viscosity of 1.0e-6 m^2/s
pair_style         hybrid/overlay sph/rhosum 1 sph/taitwater/morris
pair_coeff         * * sph/rhosum   ${h}
pair_coeff         * * sph/taitwater/morris ${sph_rho} ${sph_c} ${sph_eta} ${h}

compute            rho_peratom all meso_rho/atom

# do full time integration for shear driver and fluid, but keep walls stationary
fix                integrate_fix_full all meso


variable            var_kol atom ${A_kol}*${sph_mass}*cos(2*PI*y/${Ly})
fix                 kol_force all addforce v_var_kol 0.0 0.0

# average velocity
variable          Nfreq equal 1000
compute vxav all reduce ave vx
variable  vx_cm atom vx-c_vxav
fix av_vx all ave/spatial 1 ${Nfreq} ${Nfreq} &
y center 0.01 v_vx_cm file vx.av ave running units reduced

dump               dump_id all custom 1000 ${dname}/dump*.dat id type x y z vx vy vy c_rho_peratom
dump_modify        dump_id first yes
dump_modify        dump_id sort id
dump_modify        dump_id pad 8
thermo_modify      norm no
thermo             10

include            ${ndim}-image.lmp
variable           sph_mu  equal ${sph_eta}/${sph_rho}
include            settimestep.lmp

neighbor           3.0e-6 bin
neigh_modify       delay 0 every 1

timestep           ${dt}
communicate        single vel yes

run                100000
